f_1(x) := 1*cos(x) + 5
f_2(y) := 1*cos(2*y) + 1
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x_0 := 2
y_0 := f_1(x_0) = 4.58385
Given
# annotation to a formula above: Using inequalities to control the solution(s) returned by a solve block.
f_1(x_0) - y_0 == 0
f_2(y_0) - x_0 == 0
[x_1; y_1] := Find(x_0, y_0)
x_1 = 1.03149
y_1 = 5.51354
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